# Гидравлический диаметр
S := 7.594856*10^-5
ρ := 731.1
μ := 8.9388*10^-5
ν := μ/ρ = 1.22265e-7
P := 0.0073612*6
d_г := 4*S/P = 0.00687828
d := 0.009786
u(Re) := Re*ν/d
# Расчет ξ для u(вход) = 0.625 ИЛИ Re =50000 | Расчет ξ для u(вход) = 1.249 ИЛИ Re =100000 | Расчет ξ для u(вход) = 1.874 ИЛИ Re =150000 | Расчет ξ для u(вход) = 2.499 ИЛИ Re =200000
u(50000) = 0.624694
u(100000) = 1.24939
u(150000) = 1.87408
u(200000) = 2.49878
dp1 := 73.23
dp2 := 259.677
dp3 := 551.159
dp4 := 943.982
u1 := 0.63507
u2 := 1.2655
u3 := 1.89643
u4 := 2.526
ξ1 := dp1*2/(ρ*u1^2)
ξ2 := dp2*2/(ρ*u2^2)
ξ3 := dp3*2/(ρ*u3^2)
ξ4 := dp4*2/(ρ*u4^2)
ξ1 = 0.496706
ξ2 = 0.44357
ξ3 = 0.419234
ξ4 = 0.404716
# Расчет ξ для u(вход) = 3.123 ИЛИ Re =250000 | Расчет ξ для u(вход) = 3.748 ИЛИ Re =300000 | Расчет ξ для u(вход) = 4.373 ИЛИ Re =350000 | Расчет ξ для u(вход) = 4.998 ИЛИ Re =400000
u(250000) = 3.12347
u(300000) = 3.74816
u(350000) = 4.37286
u(400000) = 4.99755
dp5 := 1433.384
dp6 := 2018.1774
dp7 := 2696.0445
u5 := 3.156
dp8 := 3464.364879
u6 := 3.7861
u7 := 4.4160
u8 := 5.0457
ξ5 := dp5*2/(ρ*u5^2)
ξ6 := dp6*2/(ρ*u6^2)
ξ7 := dp7*2/(ρ*u7^2)
ξ8 := dp8*2/(ρ*u8^2)
ξ5 = 0.393679
ξ6 = 0.385149
ξ7 = 0.378201
ξ8 = 0.372249
# Расчет ξ для u(вход) = 5.622 ИЛИ Re =450000 | Расчет ξ для u(вход) = 6.247 ИЛИ Re =500000
u(450000) = 5.62224
u(500000) = 6.24694
dp9 := 4325.96306
dp10 := 5279.74734
u9 := 5.6743
u10 := 6.3008
ξ9 := dp9*2/(ρ*u9^2)
ξ10 := dp10*2/(ρ*u10^2)
ξ9 = 0.367546
ξ10 = 0.36381
